f(x) := 2*cos(x) - sqrt(1 - x^2)
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L(f)
Given
x := 2
d/dx(f(x)) == 0
x := Minimize(f, x)
x = 5e-7
x := 0.6
mR(f, x, h, ε) :=
    [(p ← f(x)), (x ← x + h)]
    if(|h| < ε, x, if(f(x) < p, mR(f, x, 1.1*h, ε), mR(f, x, -0.05*h, ε)))
n := mR(f, x, 0.1, 0.0001) = 0.829457
Given
f(x) := 2*cos(x) - sqrt(1 - x^2)
f'(x) == 0
S := Find(x)  # error: This variable is undefined.
