1.
Given
(d^2/dt^2(y(t))) - 2*t*(d/dt(y(t))) + y(t)*|y(t)| == 0
y(0) == 1
t := 0, 0.05 .. 2
y'(0) == -0.7
Sol := Odesolve(t, 2, 50)
d^2/dt^2(y(t)) == 2*t*(d/dt(y(t))) - y(t)*|y(t)|
y := [1; -0.7]
D(t, y) := [y[1]; 2*t*y[1] - y[0]*|y[0]|]
res := rkfixed(y, 0, 2, 20, D)
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(d^2/dt^2(y(t))) - 2*t*(d/dt(y(t))) + y(t)*|y(t)| == 0
y := 2
N := 50
h := 0.2
f(z) := rkfixed([2; z], 0, 2, N, D)[N, 1]
f(-2) = -4.62939
z := -2
Given
f(z) == -4
z := Find(z) = -2.15021
bc := rkfixed([2; z], 0, 2, 20, D)
Given
(d^2/dt^2(y(t))) - 2*t*(d/dt(y(t))) + y(t)*|y(t)| == 0
y(0) == 2
y(2) == -4
Sol := Odesolve(t, 2, 50)
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2.
h := 2/50
d^2/dx^2(y(x)) - (3 + 1)*x*(d/dx(y)) + (1*x^2)*y(x) == 0
i := 0 .. 50
x[i] := i*h
y(0) == 2
y(2) == 0
Progonka(F, D, n) :=
    [(h ← (D[1] - D[0])/n), (c[n] ← D[3]), (d[0] ← D[2]), (h2 ← 2*h)]
    for i ∈ 1 .. n - 1
        [(t ← D[0] + i*h), (f ← F(t)), (v ← 2*f[0] - h*f[1])]
        u ← (4*f[0] - h2*f[2] - c[i - 1]*v)^-1
        c[i] ← (2*f[0] + h*f[1])*u
        d[i] ← (d[i - 1]*v - h2*f[3])*u
    for i ∈ n - 1 .. 0
        c[i] ← c[i]*c[i + 1] + d[i]
    c
F(x) := [1; 4; 1*x^2; 0]
D := [0; 2; 2; 0]
j := 0 .. 2
c := Progonka(F, D, 2) = [2; -2; 0]
