# 1. | 20
f(x) := cos(1/x^2)*1/sqrt(x)
# Средствами MC
integral(f(x), x = 0 .. 1) = -0.108387
Прямоуголльников
sq(x, R) := f(x) + R*d^2/dx^2(f(x))/2
sq(0.5, 0) = -0.924392
sq(0.5, 0.0044) = -0.108484
Трапеции
trap(x) := x*(f(0 + 10^-6) + f(x))/2
trap(1) = 395.993
Параболы
par(x) := x*(f(0 + 10^-6) + 4*f(x/2) + f(x))/6
par(1) = 131.382
Гаусса
Int(f, a, b, ε) :=
    [(m ← (a + b)/2), (h ← (b - a)/2)]
    r ← 2*h*f(m)
    p ← h*f(a + h/2)
    q ← h*f(m + h/2)
    if(|p + q - h| < ε, p + q, Int(f, a, m, ε) + Int(f, m, b, ε))
Int(f, 0, 1, 10^-4) = -0.115931
# Точность - 2n-1, где n - количество узлов. n=2
21
Монте - Карло  # Средствами Маткад
f(x, y) := x/(x + y)  # Ω = {(x,y): x*y >= 1,|x+y| <= 2.5
Φ(x, y) := if(x*y ≥ 1 and (|x + y| ≤ 2.5), x/(x + y), 0)
integral(integral(Φ(x, y), x = -2.5 .. 2.5), y = -2.5 .. 2.5) = 0.467086
F(x, y) := [1 - x*y; |x + y| - 2.5]
MC(f, F, a, b, N) :=
    [(n ← last(a)), (h ← 1)]
    for i ∈ 0 .. n
        h ← h*(b[i] - a[i])
    [(h ← h/N), (S ← 0)]
    for i ∈ 1 .. N
        x ← a + rnd(b - a)
        y ← b - rnd(b - a)
        S ← S + f(x, y) if max(F(x, y)) ≤ 0
    S*h
MC(f, F, -2.5, 2.5, 1000000) =  # error: This value must be a vector.
