m := 2
x := [1; 1.2; 1.5; 2; 2.5; 2.7; 3; 3.3; 3.5; 4]
y := [5; 4; 5; 10; 11; 11; 12; 8; 10; 11]
i := 0 .. last(x)
j := 0 .. m
A[i, j] := x[i]^j
A = [
    1, 1, 1;
    1, 1.2, 1.44;
    1, 1.5, 2.25;
    1, 2, 4;
    1, 2.5, 6.25;
    1, 2.7, 7.29;
    1, 3, 9;
    1, 3.3, 10.89;
    1, 3.5, 12.25;
    1, 4, 16
]
Z := transpose(A)*A
b := transpose(A)*y
c := Z^-1*b
c = [-4.08794; 9.35123; -1.46506]
t := 0, 0.01 .. x[last(x)]
φ(x) := sum(c[i]*x^i, i = 0 .. m)
sum((y[i] - φ(x[i]))^2, i = 0 .. last(x)) = 18.93
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